Canard with strake
! Mach
0.0
! iYsym  iZsym  Zsym
1  0  0.0
! Sref  Cref  Bref
0.36  0.2  1.8
! Xref  Yref  Zref
0.62  0.0  0.0
!
!==============================================================
SURFACE
Canard
! Nchord  Cspace  Nspan  Sspace
5  1.0  8  1.0
SCALE
1.2  1.0  1.0
TRANSLATE
0.0  0.0  0.05
ANGLE
2.0
!
SECTION
! Xle  Yle  Zle  Chord  Ainc
0.0  0.0  0.0  0.1  0.0
AIRFOIL
1.00000 -0.00000
0.99048 0.00202
0.96228 0.00785
0.91640 0.01682
0.85453 0.02799
0.77897 0.04024
0.69254 0.05245
0.59855 0.06350
0.50059 0.07230
0.40247 0.07790
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CLAF
1.08
!
SECTION
0.02  0.3  0.0  0.08  0.0
AIRFOIL
1.00000 -0.00000
0.99048 0.00202
0.96228 0.00785
0.91640 0.01682
0.85453 0.02799
0.77897 0.04024
0.69254 0.05245
0.59855 0.06350
0.50059 0.07230
0.40247 0.07790
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!
!==============================================================
SURFACE
Wing
8  1.0  12  -2.0
COMPONENT
2
TRANSLATE
0.6  0.0  0.0
!
SECTION
0.0  0.0  0.0  0.25  0.0
AFILE
sd7037.dat
!
SECTION
0.05  0.9  0.08  0.15  -1.0
AFILE  0.0  0.9
sd7037.dat
!
!==============================================================
! A flat strake along the fuselage, same component as the wing, with no
! wake and not counted in the loads.
SURFACE
Strake
4  0.0  3  0.0
COMPONENT
2
NOWAKE
NOLOAD
!
SECTION
0.15  0.0  0.0  0.6  0.0
!
SECTION
0.15  0.05  0.0  0.6  0.0
