Wing with tail, elevator, fin and rudder
! Mach
0.0
! iYsym  iZsym  Zsym
0  0  0.0
! Sref  Cref  Bref
0.535  0.27  2.0
! Xref  Yref  Zref
0.08  0.0  0.0
!
!==============================================================
SURFACE
Wing
! Nchord  Cspace  Nspan  Sspace (sections are matched by the spacing)
8  1.0  14  1.0
YDUPLICATE
0.0
!
SECTION
! Xle  Yle  Zle  Chord  Ainc
0.0  0.0  0.0  0.3  1.5
AFILE
e387.dat
!
SECTION
0.01  0.5  0.02  0.27  1.0
AFILE
e387.dat
!
SECTION
0.04  1.0  0.06  0.2  0.0
AFILE
e387.dat
!
!==============================================================
SURFACE
Horizontal tail
6  1.0  8  -2.0
YDUPLICATE
0.0
TRANSLATE
0.9  0.0  0.04
ANGLE
-1.5
!
SECTION
0.0  0.0  0.0  0.15  0.0
NACA
0009
CONTROL
! name  gain  Xhinge  XYZhvec  SgnDup
elevator  1.0  0.7  0.0 1.0 0.0  1.0
!
SECTION
0.03  0.35  0.0  0.1  0.0
NACA
0009
CONTROL
elevator  1.0  0.7  0.0 1.0 0.0  1.0
!
!==============================================================
SURFACE
Fin
6  1.0  6  1.0
!
SECTION
0.88  0.0  0.0  0.18  0.0
NACA
0008
CONTROL
rudder  1.0  0.65  0.0 0.0 0.0  1.0
!
SECTION
0.95  0.0  0.22  0.1  0.0
NACA
0008
CONTROL
rudder  1.0  0.65  0.0 0.0 0.0  1.0
